# Test input file for water interacting through CS potential

units 		real
atom_style	bond

variable	dt	equal 1.0
variable	Nrun	equal 100000
variable	Nthermo equal ${Nrun}/100
variable	Ndump	equal ${Nrun}/100

lattice		sc 1.0
region		box block 0 50 0 50 0 50
create_box	1 box

molecule	dimer dimer.txt
create_atoms	0 random 84 1234 box mol 4321

pair_style	table linear 20000
pair_coeff	1 1 table_LJ_N20k_11.dat LL 6.0
pair_coeff	1 2 table_LJ_N20k_1j.dat LL 6.0
pair_coeff	2 2 table_LJ_N20k_1j.dat LL 6.0

group		methyl type 1
group		hydrox type 2

fix		1 dimer nvt temp 100 100 100

timestep	${dt}

thermo		${Nthermo}

dump		1 all atom ${Ndump} cs.lammpstrj
dump_modify	1 scale no

run		${Nrun}
undump		1
